// SBML level 3 version 2

function KT(T, TR, TA)
  exp(TA/TR - TA/T);
end

model Generic_PBK_RT_Grech()
  // model units - substance: MicroGM, time: DAY, volume: MilliL, extent: MicroGM

  // Compartments:
  compartment Art; Art is "arterial blood";
  compartment Ven; Ven is "venous blood";
  compartment Liver; Liver is "liver";
  compartment Gonads; Gonads is "gonads";
  compartment Brain; Brain is "brain";
  compartment Fat; Fat is "fat";
  compartment Skin; Skin is "skin";
  compartment GIT; GIT is "gastrointestinal tract";
  compartment Kidney; Kidney is "kidney";
  compartment Rich; Rich is "richly perfused tissue";
  compartment Poor; Poor is "poorly perfused tissue";
  compartment GIT_lumen = 1; GIT_lumen is "gut lumen";
  compartment Bile = 1; Bile is "bile";
  compartment Feces = 1; Feces is "feces";
  compartment Urine = 1; Urine is "urine";
  compartment Water = 1000; Water is "water";
  compartment Gills = 1; Gills is "gills";

  // Species:
  substanceOnly species Q_art in Art = 0; Q_art is "amount of chemical in arterial blood";
  substanceOnly species Q_ven in Ven = 0; Q_ven is "amount of chemical in venous blood";
  substanceOnly species Q_met_plasma in Ven = 0; Q_met_plasma is "amount of chemical metabolised in venous blood plasma";
  substanceOnly species Q_liver in Liver = 0; Q_liver is "amount of chemical in liver";
  substanceOnly species Q_met_liver in Liver = 0; Q_met_liver is "amount of chemical metabolised in liver";
  substanceOnly species Q_gonads in Gonads = 0; Q_gonads is "amount of chemical in gonads";
  substanceOnly species Q_brain in Brain = 0; Q_brain is "amount of chemical in brain";
  substanceOnly species Q_fat in Fat = 0; Q_fat is "amount of chemical in fat";
  substanceOnly species Q_skin in Skin = 0; Q_skin is "amount of chemical in skin";
  substanceOnly species Q_GIT in GIT = 0; Q_GIT is "amount of chemical in GI-tract";
  substanceOnly species Q_lumen_GIT in GIT_lumen = 0; Q_lumen_GIT is "amount of chemical in gut lumen";
  substanceOnly species Q_kidney in Kidney = 0; Q_kidney is "amount of chemical in kidney";
  substanceOnly species Q_rich in Rich = 0; Q_rich is "amount of chemical in richly perfused tissue";
  substanceOnly species Q_poor in Poor = 0; Q_poor is "amount of chemical in poorly perfused tissue";
  substanceOnly species Q_bile in Bile = 0; Q_bile is "amount of chemical in bile";
  substanceOnly species Q_urine in Urine = 0; Q_urine is "amount of chemical in urine";
  substanceOnly species Q_feces in Feces = 0; Q_feces is "amount of chemical in feces";
  substanceOnly species Q_water in Water = 0; Q_water is "amount of chemical in water";
  substanceOnly species Q_excret_gills in Gills = 0; Q_excret_gills is "amount of chemical excreted via gills";

  // Parameters:
  Temperature = 10; Temperature is "Ambient water temperature";
  TA = 6930; TA is "Arrhenius temperature";
  TR_DEB = 293.65; TR_DEB is "Reference temperature for DEB scaling";
  TR_Fcard = 279.15; TR_Fcard is "Reference temperature for cardiac output";
  TR_VO2 = 283.15; TR_VO2 is "Reference temperature for VO2 scaling";
  f_cst = 1;
  Bw_i = 35 GM; Bw_i is "initial body weight initial (fresh weight)";
  Bw_Fcard_ref = 270.1 GM; Bw_Fcard_ref is "reference body weight of cardiac output";
  Bw_VO2_ref = 1000 GM; Bw_VO2_ref is "reference body weight of reference for VO2";
  DEB_v = 0.38;
  DEB_g = 0.196;
  DEB_KM = 0.027;
  DEB_EHm = 452;
  DEB_EHb = 52;
  DEB_shape = 0.113;
  a_BW_L = 0.0051;
  b_BW_L = 3.3513;
  F_card_ref = 28.5;
  V_O2_ref = 3.26;
  O2_EE = 0.71;
  Sat = 0.9;
  frac_art_ven = 0.3333333;
  sc_blood = 0.0527 L_PER_KiloGM; sc_blood is "blood volume as fraction of BW";
  sc_gonads = 0.018 L_PER_KiloGM; sc_gonads is "gonads volume as fraction of BW";
  sc_brain = 0.0049 L_PER_KiloGM; sc_brain is "brain volume as fraction of BW";
  sc_liver = 0.0146 L_PER_KiloGM; sc_liver is "liver volume as fraction of BW";
  sc_fat = 0.0797 L_PER_KiloGM; sc_fat is "fat volume as fraction of BW";
  sc_skin = 0.1 L_PER_KiloGM; sc_skin is "skin volume as fraction of BW";
  sc_GIT = 0.099 L_PER_KiloGM; sc_GIT is "GI tract volume as fraction of BW";
  sc_kidney = 0.0076 L_PER_KiloGM; sc_kidney is "kidney volume as fraction of BW";
  sc_rp = 0.0257 L_PER_KiloGM; sc_rp is "richly perfused tissue volume as fraction of BW";
  sc_pp has L_PER_KiloGM; sc_pp is "poorly perfused tissue volume as fraction of BW";
  frac_gonads = 0.0138 UNITLESS; frac_gonads is "fraction of arterial blood flow to gonads";
  frac_brain = 0.018 UNITLESS; frac_brain is "fraction of arterial blood flow to brain";
  frac_liver = 0.0158 UNITLESS; frac_liver is "fraction of arterial blood flow to liver";
  frac_fat = 0.0059 UNITLESS; frac_fat is "fraction of arterial blood flow to fat";
  frac_skin = 0.057 UNITLESS; frac_skin is "fraction of arterial blood flow to skin";
  frac_GIT = 0.1759 UNITLESS; frac_GIT is "fraction of arterial blood flow to GI tract";
  frac_kidney = 0.0817 UNITLESS; frac_kidney is "fraction of arterial blood flow to kidney";
  frac_rp = 0.0952 UNITLESS; frac_rp is "fraction of arterial blood flow to richly perfused tissues";
  frac_pp has UNITLESS; frac_pp is "fraction of arterial blood flow to poorly perfused tissues";
  fub_blood = 1 UNITLESS; fub_blood is "fraction of unbound chemical in blood";
  PC_bw = 30478.95 UNITLESS; PC_bw is "partition coefficient blood:water";
  PC_liver = 9.315661 UNITLESS; PC_liver is "partition coefficient liver:blood";
  PC_gonads = 11.654918 UNITLESS; PC_gonads is "partition coefficient gonads:blood";
  PC_brain = 15.112057 UNITLESS; PC_brain is "partition coefficient brain:blood";
  PC_fat = 195.007317 UNITLESS; PC_fat is "partition coefficient fat:blood";
  PC_skin = 6.003432 UNITLESS; PC_skin is "partition coefficient skin:blood";
  PC_GIT = 59.62009 UNITLESS; PC_GIT is "partition coefficient GIT:blood";
  PC_kidney = 10.764761 UNITLESS; PC_kidney is "partition coefficient kidney:blood";
  PC_rp = 14.014875 UNITLESS; PC_rp is "partition coefficient richly perfused:blood";
  PC_pp = 6.21045 UNITLESS; PC_pp is "partition coefficient poorly perfused:blood";
  a_Fpp = 0.4 UNITLESS; a_Fpp is "fraction of PPT blood going to venous";
  a_Fs = 0.1 UNITLESS; a_Fs is "fraction of skin blood going to venous";
  Ku = 1.14619 PER_DAY; Ku is "uptake rate from lumen to GIT wall";
  frac_abs = 0 UNITLESS; frac_abs is "absorption fraction";
  Km = 0; Km is "Michaelis constant";
  Vmax = 0; Vmax is "Max metabolic rate";
  Cl_liver = 0; Cl_liver is "Liver clearance";
  rate_plasma = 0; rate_plasma is "plasma metabolism rate";
  Ke_bile = 1.5 PER_DAY; Ke_bile is "first-order bile excretion rate";
  Ke_urine = 0 PER_DAY; Ke_urine is "urine elimination rate";
  Ke_water = 0 PER_DAY; Ke_water is "water elimination rate (gills)";
  K_BG = 0 PER_DAY; K_BG is "transfer rate from bile to gut lumen";
  Ke_feces = 0.83 PER_DAY; Ke_feces is "fecal excretion rate";
  TC_c = 10;
  BW = 35 GM; BW is "body weight";
  var F_card_g; F_card_g is "cardiac output expressed per BW";
  var F_card; F_card is "cardiac output";
  var F_liver; F_liver is "blood flow to liver";
  Vmax_sc has MicroGM_PER_DAY;

  // Assignment rules:
  Art := sc_blood*BW*frac_art_ven;
  Ven := sc_blood*BW - Art;
  Liver := sc_liver*BW;
  Gonads := sc_gonads*BW;
  Brain := sc_brain*BW;
  Fat := sc_fat*BW;
  Skin := sc_skin*BW;
  GIT := sc_GIT*BW;
  Kidney := sc_kidney*BW;
  Rich := sc_rp*BW;
  Poor := BW - (Art + Ven + Liver + Gonads + Brain + Fat + Skin + GIT + Kidney + Rich);
  sc_pp := 1 - sc_blood - sc_gonads - sc_brain - sc_liver - sc_fat - sc_skin - sc_GIT - sc_kidney - sc_rp;
  frac_pp := 1 - frac_gonads - frac_brain - frac_liver - frac_fat - frac_skin - frac_GIT - frac_kidney - frac_rp;
  TC_k := TC_c + 273.15;
  F_card_g := F_card_ref*KT(TC_k, TR_Fcard, TA)*(BW/Bw_Fcard_ref)^(-0.1);
  F_card := F_card_g*BW;
  F_liver := frac_liver*F_card;
  F_gonads := frac_gonads*F_card;
  F_brain := frac_brain*F_card;
  F_fat := frac_fat*F_card;
  F_skin := frac_skin*F_card;
  F_GIT := frac_GIT*F_card;
  F_kidney := frac_kidney*F_card;
  F_rp := frac_rp*F_card;
  F_pp := F_card - (F_liver + F_gonads + F_brain + F_fat + F_skin + F_GIT + F_kidney + F_rp);
  V_O2_g := V_O2_ref*KT(TC_k, TR_VO2, TA)*(BW/Bw_VO2_ref)^(-0.1);
  V_O2 := V_O2_g*BW;
  C_O2_water := (-0.24*TC_c + 14.04)*Sat/10^3;
  F_water := V_O2/(O2_EE*C_O2_water);
  Kx := min(F_water, F_card*PC_bw);
  Vmax_sc := Vmax*sc_liver*BW;
  Cl_liver_sc := Cl_liver*sc_liver*BW;
  rate_plasma_sc := rate_plasma*BW;

  // Reactions:
  _J0: Q_ven -> Q_excret_gills; Kx*(Q_ven/Ven)*fub_blood/PC_bw;
  _J1: Q_water -> Q_ven; Kx*(Q_water/Water);
  _J2: Q_lumen_GIT -> Q_GIT; Ku*Q_lumen_GIT;
  _J3: Q_lumen_GIT -> Q_feces; Q_lumen_GIT*Ke_feces;
  _J4: Q_GIT -> Q_liver; F_GIT*(Q_GIT/GIT)/PC_GIT;
  _J5: Q_liver -> Q_bile; Ke_bile*Q_liver;
  _J6: Q_kidney -> Q_urine; Ke_urine*Q_kidney;
  _J7: Q_bile -> Q_lumen_GIT; Q_bile*K_BG;
  _J8: Q_art -> Q_GIT; F_GIT*(Q_art/Art);
  _J9: Q_art -> Q_brain; F_brain*(Q_art/Art);
  _J10: Q_art -> Q_fat; F_fat*(Q_art/Art);
  _J11: Q_art -> Q_skin; F_skin*(Q_art/Art);
  _J12: Q_art -> Q_kidney; F_kidney*(Q_art/Art);
  _J13: Q_art -> Q_liver; F_liver*(Q_art/Art);
  _J14: Q_art -> Q_gonads; F_gonads*(Q_art/Art);
  _J15: Q_art -> Q_rich; F_rp*(Q_art/Art);
  _J16: Q_art -> Q_poor; F_pp*(Q_art/Art);
  _J17: Q_ven -> Q_art; F_card*(Q_ven/Ven);
  _J18: Q_brain -> Q_ven; F_brain*(Q_brain/Brain)/PC_brain;
  _J19: Q_liver -> Q_ven; (F_liver + F_rp + F_gonads + F_GIT)*(Q_liver/Liver)/PC_liver;
  _J20: Q_fat -> Q_ven; F_fat*(Q_fat/Fat)/PC_fat;
  _J21: Q_kidney -> Q_ven; (F_kidney + (1 - a_Fpp)*F_pp + (1 - a_Fs)*F_skin)*(Q_kidney/Kidney/PC_kidney);
  _J22: Q_poor -> Q_ven; a_Fpp*F_pp*(Q_poor/Poor)/PC_pp;
  _J23: Q_skin -> Q_ven; a_Fs*F_skin*(Q_skin/Skin)/PC_skin;
  _J24: Q_gonads -> Q_liver; F_gonads*(Q_gonads/Gonads)/PC_gonads;
  _J25: Q_rich -> Q_liver; F_rp*(Q_rich/Rich)/PC_rp;
  _J26: Q_poor -> Q_kidney; (1 - a_Fpp)*F_pp*(Q_poor/Poor)/PC_pp;
  _J27: Q_skin -> Q_kidney; (1 - a_Fs)*F_skin*(Q_skin/Skin)/PC_skin;
  _J28: Q_ven -> Q_met_plasma; rate_plasma_sc*Q_ven;
  _J29: Q_liver -> Q_met_liver; Cl_liver_sc*(Q_liver/Liver)/PC_liver;

  // Unit definitions:
  unit MicroGM = 1e-6 gram;
  unit DAY = 86400 second;
  unit MilliL = 1e-3 litre;
  unit GM = gram;
  unit L_PER_KiloGM = litre / (1000 gram);
  unit UNITLESS = dimensionless;
  unit PER_DAY = 1 / (86400 second);
  unit MicroGM_PER_DAY = 1e-6 gram / (86400 second);
end
